// COMSOL Multiphysics 6.1.0.357 model "model.mph"
// Outline of the model tree

Parameters
  theta = 0[deg]  // Elevation angle
  phi = 0[deg]  // Azimuth angle
  rot = 0[deg]  // Rotation angle
  lda_c = c_const/1[THz]  // Characteristic wavelength
  g_c = 600[nm]  // Characteristic minimal feature size
  n_c = 4.8  // Characteristic substrate index
  p_c = 70[um]  // Characteristic unit cell size
  cond = 0.00E+00[S/m]  // Conductivity

Functions
  int2: Interpolation "LSAT" | importedname = lsat.csv; funcs = {{lsat_eps1, 1}, {lsat_eps2, 2}}; source = file; filename = optical_functions/lsat.csv; fununit = {, }; argunit = Hz
  int1: Interpolation "Gold" | importedname = gold.csv; funcs = {{au_eps1, 1}, {au_eps2, 2}}; source = file; filename = optical_functions/gold.csv; fununit = {, }; argunit = Hz

Variables
  var2 "variables"
    k_x = emw.k0*sin(theta)*cos(phi)  // kx for incident wave
    k_y = emw.k0*sin(theta)*sin(phi)  // ky for incident wave
    k_z = emw.k0*cos(theta)  // kz for incident wave

Coordinate systems
  sys1: Boundary "Boundary System" | name = sys
  pml1: PML "pml_top" on domains 4 | name = pml_top
  pml2: PML "pml_bottom" on domains 1 | name = pml_bottom

Geometry
  geom "Geometry" (3D, length unit µm)
    wp_extrusion: WorkPlane | selplaneshow = on; unite = on
      imp3: Import "unit_cell" | type = dxf; filename = cad/F21059.dxf; layerselection = selected; layers = unit_cell
      sq1: Square "wp_extrusion" | size = 100
      int1: Intersection | input = imp3, sq1
    ext1: Extrude "extrude_domain"
      workplane = wp_extrusion
      input = selection wp_extrusion
      inputhandling = keep
      distance = {150[um], 100[um], -500[um], -550[um]}
      scale = {{1, 1}, {1, 1}, {1, 1}, {1, 1}}
      displ = {{0, 0}, {0, 0}, {0, 0}, {0, 0}}
      twist = {0, 0, 0, 0}
      baseid = {3, 1, 4, 5, 0, 6, 7, 8, 2}
    wp_structure: WorkPlane | selplaneshow = on; unite = on
      imp3: Import "structure" | type = dxf; filename = cad/F21059.dxf; layerselection = selected; layers = structure
      spl1: Split | input = imp3
      imp4: Import "surface" | type = dxf; filename = cad/F21059.dxf; layerselection = selected; layers = gap
      pt1: Point
      uni1: Union | input = imp4, spl1
      sq1: Square | size = 100
      int1: Intersection | input = sq1, uni1
    ballsel1: BallSelection "gapcenter_ballsel" | r = 0.1; condition = inside; entitydim = 0
    sel1: ExplicitSelection "surface_selection" | selection = wp_structure.uni boundaries 1-4
    fin: Finalize "Form Union"

Materials
  air_mat: Common "Vacuum" on all domains
    def "Basic"
      relpermeability = 1
      relpermittivity = 1
      electricconductivity = 0
  sub_mat: Common "Substrate" on domains 1, 2
    def "Basic"
      relpermittivity = lsat_eps1(freq)-j*lsat_eps2(freq)
      electricconductivity = 0
      relpermeability = 1
  res_mat: Common "Resonator" on boundaries 14
    def "Basic"
      relpermittivity = au_eps1(freq)-j*au_eps2(freq)
      relpermeability = 1
      electricconductivity = 0
  film_mat: Common "Film" on boundaries 15, 20
    def "Basic"
      relpermittivity = 1
      relpermeability = 1
      electricconductivity = 0
  gap_mat: Common "Gap" on boundaries 9
    def "Basic"
      relpermittivity = 1
      relpermeability = 1
      electricconductivity = 0

Physics
  emw: ElectromagneticWaves "Electromagnetics" on all domains
    dependent variable E = {Ex, Ey, Ez}
    wee1: WaveEquationElectric (default)
    pec1: PerfectElectricConductor "pec" (default)
    init1: init "initial_values" (default)
    trans1: TransitionBoundaryCondition "tbc_resonator" on boundaries 14 | d = 200[nm]; noCoupling = 1
    trans2: TransitionBoundaryCondition "tbc_nickelate" on boundaries 15, 20 | d = 11[nm]
    trans3: TransitionBoundaryCondition "tbc_gap" on boundaries 9 | d = 11[nm]
    port1: Port "port_emitter" on boundaries 12
      PortSlit = 1
      SlitType = DomainBacked
      PortOrientation = ReversePort
      InputType = E
      beta = abs(k_z)
      E0 = {0, exp(-i*k_x*x) * exp(-i*k_y*y), 0}
    port2: Port "port_receiver" on boundaries 6
      PortSlit = 1
      SlitType = DomainBacked
      beta = abs(k_z)
      E0 = {0, exp(-i*k_x*x) * exp(-i*k_y*y), 0}
    pmc1: PerfectMagneticConductor "pmc" on boundaries 1, 4, 7, 10, 21-24
    sctr2: Scattering "sbc" on boundaries 3, 13

Mesh
  mesh
    size: MeshSizeDefault | hmax = 38.5; hmin = 2.8; hauto = 3
    ftri_surface: FreeTri "surface" on boundaries 9, 14, 15, 20
      size1: Size on entire geometry | hmax = g_c * 2.0; hmin = g_c / 2.0; custom = on
    refine_gap: Refine "gap_refine" on boundaries 9 | rmethod = regular
    ftet1: FreeTet "remainder" on remaining entities
      size1: Size on entire geometry | hmax = lda_c / 8 / n_c; hmin = g_c / 2.0; custom = on

Studies
  std1 "Frequency study"
    freq: Frequency "Frequency Domain" | punit = THz; plist = 1[THz]

Solver configurations
  sol1 "Solution 1" (study std1)
    v1: Variables "Dependent Variables 1.1"
    s1: Stationary "Stationary Solver 1.1" | stol = 0.01
      fc1: FullyCoupled | linsolver = i1
      i1: Iterative "Suggested Iterative Solver (emw)" | itrestart = 300; prefuntype = right
        mg1: Multigrid | iter = 1
      p1: Parametric | pname = freq; plistarr = 1[THz]; punit = THz; pcontinuationmode = no

Datasets
  dset1: Solution | solution = sol1
  surf1: Surface on selection geom_sel1 | data = dset1

Derived values
  gap_point: EvalPoint "gap" on selection geom_ballsel1
    data = dset1
    table = params_table
    expr = {real(emw.Ey), imag(emw.Ey), real(emw.sigmabnd), imag(emw.sigmabnd)}
    unit = {V/m, V/m, S/m, S/m}
    descr = {Ey.real, Ey.imag, cond.real, cond.imag}
  gev1: EvalGlobal "global"
    data = dset1
    table = params_table
    expr = {real(emw.S11), imag(emw.S11), real(emw.S21), imag(emw.S21)}
    unit = {1, 1, 1, 1}
    descr = {s11.real, s11.imag, s21.real, s21.imag}

Exports
  params_export: Table "parameters" | table = params_table; ifexists = append
  spatial_data: Data "surface_solution"
    data = surf1
    expr = {real(emw.Ex), imag(emw.Ex), real(emw.Ey), imag(emw.Ey), real(emw.Hz), imag(emw.Hz), real(emw.Jsupx), imag(emw.Jsupx), real(emw.Jsupy), imag(emw.Jsupy), real(emw.sigmabnd), imag(emw.sigmabnd)}
    unit = {V/m, V/m, V/m, V/m, A/m, A/m, A/m, A/m, A/m, A/m, S/m, S/m}
    descr = {Ex.real, Ex.imag, Ey.real, Ey.imag, Hz.real, Hz.imag, Jsupx.real, Jsupx.imag, Jsupy.real, Jsupy.imag, cond.real, cond.imag}
    location = regulargrid
    regulargridx2 = 250
    regulargridy2 = 250
    ifexists = append
    separator = ,